<?xml version="1.0"?>

<!-- Authors: Lachlan Eggins, Jonathan Redpath, Josh Davidson (Octal450), Richard Harrison -->

<turbine_engine name="TF30-P-109">
	<milthrust>12350</milthrust>
	<maxthrust>20840</maxthrust>
	<bypassratio>2.5</bypassratio>
	<tsfc>0.66</tsfc>
	<atsfc>2.78</atsfc>
	<bleed>0.03</bleed>
	<idlen1>30.0</idlen1>
	<idlen2>60.0</idlen2>
	<maxn1>100.0</maxn1>
	<maxn2>100.0</maxn2>
	<augmented>1</augmented>
	<augmethod>2</augmethod>
	<injected>0</injected>
	<n1spinup>1</n1spinup>
	<n2spinup>3</n2spinup>

	<function name="IdleThrust">
		<table>
			<independentVar lookup="row">velocities/mach</independentVar>
			<independentVar lookup="column">atmosphere/density-altitude</independentVar>
			<tableData>
				    -10000   0       10000   20000   30000   40000   50000   60000
				0.0  0.0430  0.0488  0.0528  0.0694  0.0899  0.1183  0.1467  0.0000
				0.2  0.0500  0.0501  0.0335  0.0544  0.0797  0.1049  0.1342  0.0000
				0.4  0.0040  0.0047  0.0020  0.0272  0.0595  0.0891  0.1203  0.0000
				0.6 -0.0804 -0.0804 -0.0560 -0.0237  0.0276  0.0718  0.1073  0.0000
				0.8 -0.2129 -0.2129 -0.1498 -0.1025  0.0474  0.0868  0.0900  0.0000
				1.0 -0.2839 -0.2839 -0.1104 -0.0469 -0.0270  0.0552  0.0800  0.0000
			</tableData>
		</table>
	</function>

	<function name="MilThrust"> <!-- By Richard, TF-30 for F-14A -->
		<table>
			<independentVar lookup="row">velocities/mach</independentVar>
			<independentVar lookup="column">atmosphere/density-altitude</independentVar>
			<tableData>
			     0         10000     20000     30000     35000     36089     40000     45000     60000
			0.0  1.000000  0.803397  0.572200  0.242896  0.210994  0.195463  0.078367  0.043212  0.000000
			0.2  0.881084  0.701247  0.523986  0.282433  0.237882  0.219164  0.122508  0.083848  0.000000
			0.4  0.804974  0.658839  0.504964  0.321970  0.264771  0.242865  0.166647  0.124484  0.000000
			0.6  0.747443  0.641290  0.502543  0.358275  0.290946  0.271333  0.210787  0.165120  0.000000
			0.8  0.698056  0.624156  0.505708  0.386999  0.319891  0.305378  0.250701  0.201208  0.000000
			1.0  0.652371  0.591138  0.507113  0.405529  0.349636  0.329624  0.277992  0.221549  0.000000
			1.2  0.595840  0.531190  0.497454  0.424059  0.379448  0.329624  0.299089  0.241208  0.000000
			1.4  0.533954  0.466705  0.484761  0.442589  0.409259  0.329624  0.320185  0.260867  0.000000
			1.6  0.472066  0.402219  0.472068  0.461120  0.439071  0.329624  0.341280  0.280527  0.000000
			</tableData>
		</table>
	</function>

	<function name="AugThrust">
		<table>
		<independentVar lookup="row">velocities/mach</independentVar>
		<independentVar lookup="column">atmosphere/density-altitude</independentVar>
			<tableData>
				      -10000   0       10000   20000   30000   40000   50000   60000
				0.0    1.1816  1.0000  0.8184  0.6627  0.5280  0.3756  0.2327  0.0000
				0.2    1.1308  0.9599  0.7890  0.6406  0.5116  0.3645  0.2258  0.0000
				0.4    1.1150  0.9474  0.7798  0.6340  0.5070  0.3615  0.2240  0.0000
				0.6    1.1284  0.9589  0.7894  0.6420  0.5134  0.3661  0.2268  0.0000
				0.8    1.1707  0.9942  0.8177  0.6647  0.5309  0.3784  0.2345  0.0000
				1.0    1.2411  1.0529  0.8648  0.7017  0.5596  0.3983  0.2467  0.0000
				1.2    1.3287  1.1254  0.9221  0.7462  0.5936  0.4219  0.2614  0.0000
				1.4    1.4365  1.2149  0.9933  0.8021  0.6360  0.4509  0.2794  0.0000
				1.6    1.5711  1.3260  1.0809  0.8700  0.6874  0.4860  0.3011  0.0000
				1.8    1.7301  1.4579  1.1857  0.9512  0.7495  0.5289  0.3277  0.0000
				2.0    1.8314  1.5700  1.3086  1.0474  0.8216  0.5786  0.3585  0.0000
				2.2    1.9700  1.6900  1.4100  1.2400  0.9100  0.6359  0.3940  0.0000
				2.4    2.0700  1.8000  1.5300  1.3400  1.0000  0.7200  0.4600  0.0000
				2.6    2.2000  1.9200  1.6400  1.4400  1.1000  0.8000  0.5200  0.0000
			</tableData>
		</table>
	</function>

</turbine_engine>
