<?xml version="1.0"?>

<!-- Copyright (c) 2020 Josh Davidson (Octal450) -->

<fdm_config name="F-111C" version="2.0" release="BETA">

	<fileheader>
		<author>Josh Davidson (Octal450)</author>
		<version>Pre V1.0</version>
		<description>F-111C FDE</description>
	</fileheader>

	<metrics>
		<wingarea unit="FT2">657.42</wingarea> <!-- Check -->
		<wingspan unit="FT">69.98</wingspan> <!-- Check -->
		<chord unit="FT">9.39</chord> <!-- Check -->
		<htailarea unit="FT2">131.48</htailarea> <!-- Check -->
		<vtailarea unit="FT2">118.33</vtailarea> <!-- Check -->

		<location name="AERORP" unit="M">
			<x>-0.82412</x>
			<y>0</y>
			<z>-0.10861</z>
		</location>

		<location name="EYEPOINT" unit="M">
			<x>-8.22074</x>
			<y>0</y>
			<z>0.45105</z>
		</location>

		<location name="VRP" unit="M">
			<x>-2.75148</x> <!-- Offset because the X is not centered in the 3D -->
			<y>0</y>
			<z>0</z>
		</location>
	</metrics>

	<mass_balance>
		<ixx unit="SLUG*FT2">150903</ixx> <!-- Check -->
		<iyy unit="SLUG*FT2">228756</iyy> <!-- Check -->
		<izz unit="SLUG*FT2">316946</izz> <!-- Check -->
		<ixy unit="SLUG*FT2">0</ixy>
		<ixz unit="SLUG*FT2">0</ixz>
		<iyz unit="SLUG*FT2">0</iyz>
		<emptywt unit="LBS" >47187</emptywt>

		<location name="CG" unit="M"> <!-- Guess -->
			<x>-1.02412</x>
			<y>0</y>
			<z>-0.10861</z>
		</location>
	</mass_balance>

	<ground_reactions>
		<contact type="BOGEY" name="NOSE">
			<location unit="M">
				<x>-6.93083</x>
				<y>0</y>
				<z>-2.39378</z>
			</location>
			<static_friction>0.8</static_friction>
			<dynamic_friction>0.5</dynamic_friction>
			<rolling_friction>0.02</rolling_friction>
			<spring_coeff unit="LBS/FT">33006.2</spring_coeff>
			<damping_coeff unit="LBS/FT/SEC">16503.1</damping_coeff>
			<max_steer unit="DEG">45</max_steer>
			<brake_group>NONE</brake_group>
			<retractable>1</retractable>
		</contact>
		<contact type="BOGEY" name="LEFT_MAIN">
			<location unit="M">
				<x>0.14438</x>
				<y>-1.30941</y>
				<z>-2.61038</z>
			</location>
			<static_friction>0.8</static_friction>
			<dynamic_friction>0.5</dynamic_friction>
			<rolling_friction>0.02</rolling_friction>
			<spring_coeff unit="LBS/FT">110020.68</spring_coeff>
			<damping_coeff unit="LBS/FT/SEC">55010.34</damping_coeff>
			<max_steer unit="DEG">0</max_steer>
			<brake_group>LEFT</brake_group>
			<retractable>1</retractable>
		</contact>
		<contact type="BOGEY" name="RIGHT_MAIN">
			<location unit="M"> <!-- Check -->
				<x>0.14438</x>
				<y>1.30941</y>
				<z>-2.61038</z>
			</location>
			<static_friction>0.8</static_friction>
			<dynamic_friction>0.5</dynamic_friction>
			<rolling_friction>0.02</rolling_friction>
			<spring_coeff unit="LBS/FT">110020.68</spring_coeff>
			<damping_coeff unit="LBS/FT/SEC">55010.34</damping_coeff>
			<max_steer unit="DEG">0</max_steer>
			<brake_group>LEFT</brake_group>
			<retractable>1</retractable>
		</contact>
	</ground_reactions>

	<propulsion>
		<engine file="TF30-P-100">
			<location unit="M">
				<x>3.48973</x>
				<y>-0.78672</y>
				<z>0.03735</z>
			</location>
			<orient unit="DEG">
				<pitch>0</pitch>
				<roll>0</roll>
				<yaw>0</yaw>
			</orient>
			<feed>0</feed>
			<thruster file="direct">
				<location unit="M">
					<x>3.48973</x>
					<y>-0.78672</y>
					<z>0.03735</z>
				</location>
				<orient unit="DEG">
					<pitch>0</pitch>
					<roll>0</roll>
					<yaw>0</yaw>
				</orient>
			</thruster>
		</engine>

		<engine file="TF30-P-100">
			<location unit="M">
				<x>3.48973</x>
				<y>0.78672</y>
				<z>0.03735</z>
			</location>
			<orient unit="DEG">
				<pitch>0</pitch>
				<roll>0</roll>
				<yaw>0</yaw>
			</orient>
			<feed>1</feed>
			<thruster file="direct">
				<location unit="M">
					<x>3.48973</x>
					<y>0.78672</y>
					<z>0.03735</z>
				</location>
				<orient unit="DEG">
					<pitch>0</pitch>
					<roll>0</roll>
					<yaw>0</yaw>
				</orient>
			</thruster>
		</engine>

		<tank type="FUEL" number="0">
			<location unit="M"> <!-- CG for now -->
				<x>-1.02412</x>
				<y>0</y>
				<z>-0.10861</z>
			</location>
			<capacity unit="LBS">7591.43</capacity>
			<contents unit="LBS">3795.71</contents>
		</tank>

		<tank type="FUEL" number="1">
			<location unit="M"> <!-- CG for now -->
				<x>-1.02412</x>
				<y>0</y>
				<z>-0.10861</z>
			</location>
			<capacity unit="LBS">7591.43</capacity>
			<contents unit="LBS">3795.71</contents>
		</tank>

		<tank type="FUEL" number="2">
			<location unit="M"> <!-- CG for now -->
				<x>-1.02412</x>
				<y>0</y>
				<z>-0.10861</z>
			</location>
			<capacity unit="LBS">7591.43</capacity>
			<contents unit="LBS">3795.71</contents>
		</tank>
	</propulsion>

	<!--system file="f-111c-fcs"/-->

    <system file="hydraulics"/>
	<flight_control name="none"/>
	<aerodynamics file="Systems/f-111c-aerodynamics.xml"/>
	<!--external_reactions file="Systems/f-111c-external-reactions"/-->
</fdm_config>
