<?xml version="1.0"?>

<!-- General Dynamics F-111C Aerodynamics -->
<!-- Copyright (c) 2020 Josh Davidson (Octal450) -->
<!-- Source A: AD-AOS7-1109 -->

<aerodynamics>

	<property value="0">tune</property>
	<property value="26">fcs/wing-sweep-deg</property> <!-- Move to FCS later -->

	<!-- CL -->
	<function name="aero/function/kCLge">
		<description>Lift factor due to ground effect</description>
		<table>
			<independentVar lookup="row">aero/h_b-mac-ft</independentVar>
			<tableData>
				0.00  1.203
				0.10  1.127
				0.15  1.090
				0.20  1.073
				0.30  1.046
				0.40  1.055
				0.50  1.019
				0.60  1.013
				0.70  1.008
				0.80  1.006
				0.90  1.003
				1.00  1.002
				1.10  1.000
			</tableData>
		</table>
	</function>

	<function name="aero/coefficient/CLalpha">
		<description>Lift due to alpha</description>
		<product>
			<property>aero/function/kCLge</property>
			<table> <!-- Based off: Source A, Figure 8 CL -->
				<independentVar lookup="row">aero/alpha-deg</independentVar>
				<independentVar lookup="column">velocities/mach</independentVar>
				<independentVar lookup="table">fcs/wing-sweep-deg</independentVar>
				<tableData breakPoint="26">
					         0.50          0.70          0.80          0.90          0.95
					-1.7010 -0.1244662800 -0.1327963311 -0.1617299082 -0.1816897771 -0.2236527931
					-0.7424 -0.0387008142 -0.0401098831 -0.0350672851 -0.1140200832 -0.1313383950
					 0.2602  0.0583640289  0.0684060573  0.0779948608 -0.0418303420 -0.0435994049
					 1.2188  0.1599562835  0.1723817953  0.2001374141  0.0508104717  0.0487149932
					 2.1995  0.2638058601  0.2854379382  0.3109193913  0.1434311291  0.1387416872
					 4.1847  0.4760196571  0.5069692108  0.5143426646  0.3695443545  0.3550985187
					 6.1488  0.6474356797  0.7081511938  0.6633237613  0.5684566709  0.5964437289
					 8.2012  0.8142732202  0.8343586199  0.7782331963  0.7582684238  0.8263680558
					10.2516  0.9062105719  0.9424256414  0.9067229746  0.9231090568  1.0108910330
					12.2344  1.0117684611  1.0345917516  1.0170720720  1.0810587594  1.1750363123
					14.3052  1.0991784012  1.1131474571  1.1364915098  1.2344984927  1.3186804382
					16.2853  1.2229863807  1.2325649848  1.2649510871  1.3493263391  1.4216220779
					20.1408  1.0991784012  1.1131474571  1.1364915098  1.2344984927  1.3186804382
					35.1093  0.4760196571  0.5069692108  0.5143426646  0.3695443545  0.3550985187
				</tableData>
				<tableData breakPoint="54">
					         0.90          0.95          1.05          1.10          1.20          1.30
					-2.0176 -0.1763198607 -0.1940248299 -0.2695693601 -0.2451986714 -0.2201322789 -0.1980823091
					-1.1985 -0.0969437242 -0.1029400005 -0.1783520228 -0.1607454311 -0.1381561784 -0.1161356223
					-0.3335 -0.0175146394 -0.0211407744 -0.0708448191 -0.0669479801 -0.0492277161 -0.0341230354
					 0.5080  0.0665010929  0.0676672648  0.0342836303  0.0267705059  0.0326826720  0.0478236515
					 1.3724  0.1528498601  0.1541390329  0.1348714191  0.1229138803  0.1239176362  0.1367227915
					 3.0572  0.3047353991  0.3177969658  0.3197932718  0.3011250890  0.3109348561  0.3099080695
					 4.8089  0.4774594077  0.4953238230  0.5208965669  0.4909869494  0.4910325703  0.4784803453
					 6.4907  0.6616367978  0.6774934819  0.7128101169  0.6854222086  0.6734696426  0.6424396191
					 8.2452  0.8043755160  0.7524325968  0.8863080355  0.7722608548  0.8305023377  0.7174338528
					 9.0889  0.8653256404  0.8273419713  0.9591458827  0.8569115080  0.8916870649  0.7925598867
					 9.9323  0.9308888863  0.8954209749  1.0343263427  0.9367518668  0.9529375043  0.8491350621
					10.7979  1.0033982888  0.9634107574  1.1003170577  1.0074849103  1.0094763715  0.9057761376
					11.6638  1.0736011304  1.0360730820  1.1546669908  1.0688342604  1.0660809510  0.9554318099
					12.5292  1.1484170937  1.1063396548  1.2160086213  1.1257286593  1.1111530210  1.0074269333
					13.3721  1.2185934612  1.1766954487  1.2680882242  1.1826230582  1.1608380947  1.0571485057
					14.2609  1.2888227770  1.2446852313  1.3179336380  1.2302127289  1.2035708067  1.1021582260
					15.1264  1.3636387403  1.3437305655  1.3700855234  1.3138598665  1.2509165224  1.1645655541
					20.1408  1.2888227770  1.2446852313  1.3179336380  1.2302127289  1.2035708067  1.1021582260
					35.1093  0.4774594077  0.4953238230  0.5208965669  0.4909869494  0.4910325703  0.4784803453
				</tableData>
			</table>
		</product>
	</function>

	<!-- CD -->
	<function name="aero/function/kCDge">
		<description>Drag factor due to ground effect</description>
		<table>
			<independentVar lookup="row">aero/h_b-mac-ft</independentVar>
			<tableData>
				0.00  0.480
				0.10  0.515
				0.15  0.629
				0.20  0.709
				0.30  0.815
				0.40  0.882
				0.50  0.928
				0.60  0.962
				0.70  0.988
				0.80  1.000
			</tableData>
		</table>
	</function>

	<!-- CY -->
	<function name="aero/coefficient/CYbeta">
		<description>Side force due to beta</description>
		<table> <!-- Based off: Source A, Figure 8 CY -->
			<independentVar lookup="row">aero/beta-deg</independentVar>
			<independentVar lookup="column">velocities/mach</independentVar>
			<independentVar lookup="table">fcs/wing-sweep-deg</independentVar>
			<tableData breakPoint="26">
				          0.50          0.70          0.80          0.90          0.95
				-10.3843  0.1680770167  0.1623022073  0.1594432049  0.1654356860  0.1818394451
				 -8.3312  0.1376443704  0.1320928383  0.1308525040  0.1353449780  0.1456243934
				 -6.3388  0.1041852522  0.1018948325  0.0992617890  0.0992561286  0.1079055894
				 -4.4063  0.0767905275  0.0716911451  0.0676691871  0.0661729536  0.0746885727
				 -2.2322  0.0478653926  0.0460005871  0.0405747197  0.0405784933  0.0414772378
				  0.0000  0.0000000000  0.0000000000  0.0000000000  0.0000000000  0.0000000000
				  2.2322 -0.0478653926 -0.0460005871 -0.0405747197 -0.0405784933 -0.0414772378
				  4.4063 -0.0767905275 -0.0716911451 -0.0676691871 -0.0661729536 -0.0746885727
				  6.3388 -0.1041852522 -0.1018948325 -0.0992617890 -0.0992561286 -0.1079055894
				  8.3312 -0.1376443704 -0.1320928383 -0.1308525040 -0.1353449780 -0.1456243934
				 10.3843 -0.1680770167 -0.1623022073 -0.1594432049 -0.1654356860 -0.1818394451
			</tableData>
			<tableData breakPoint="54">
				          0.90          0.95          1.05          1.10          1.20          1.30
				-10.4767  0.1782940743  0.1769831484  0.1784653465  0.1784653465  0.1931974972  0.1887511173
				 -8.4735  0.1403938167  0.1379093026  0.1362761276  0.1392280895  0.1524833261  0.1480644496
				 -6.2316  0.1010857563  0.0974106042  0.1014576458  0.1029611294  0.1132635053  0.1103023080
				 -4.1988  0.0646761134  0.0642005754  0.0681334800  0.0696002934  0.0755013637  0.0710824872
				 -2.1376  0.0371641516  0.0339315888  0.0348001467  0.0362761276  0.0392244047  0.0362540396
				  0.0000  0.0000000000  0.0000000000  0.0000000000  0.0000000000  0.0000000000  0.0000000000
				  2.1376 -0.0371641516 -0.0339315888 -0.0348001467 -0.0362761276 -0.0392244047 -0.0362540396
				  4.1988 -0.0646761134 -0.0642005754 -0.0681334800 -0.0696002934 -0.0755013637 -0.0710824872
				  6.2316 -0.1010857563 -0.0974106042 -0.1014576458 -0.1029611294 -0.1132635053 -0.1103023080
				  8.4735 -0.1403938167 -0.1379093026 -0.1362761276 -0.1392280895 -0.1524833261 -0.1480644496
				 10.4767 -0.1782940743 -0.1769831484 -0.1784653465 -0.1784653465 -0.1931974972 -0.1887511173
			</tableData>
		</table>
	</function>

	<!-- Cl -->

	<!-- Cm -->

	<!-- Cn -->
	<function name="aero/coefficient/Cnbeta">
		<description>Yaw moment due to beta</description>
		<table> <!-- Based off: Source A, Figure 8 Cn -->
			<independentVar lookup="row">aero/beta-deg</independentVar>
			<independentVar lookup="column">velocities/mach</independentVar>
			<independentVar lookup="table">fcs/wing-sweep-deg</independentVar>
			<tableData breakPoint="26">
				          0.50          0.70          0.80          0.90          0.95
				-10.6640 -0.0157104558 -0.0172043011 -0.0164516129 -0.0157951482 -0.0184823848
				 -8.6238 -0.0116353887 -0.0135483871 -0.0129032258 -0.0127762803 -0.0150135501
				 -6.6056 -0.0080965147 -0.0100000000 -0.0093548387 -0.0094339623 -0.0100271003
				 -4.5438 -0.0039142091 -0.0053763441 -0.0054838710 -0.0050134771 -0.0052574526
				 -2.2655 -0.0004825737 -0.0026881720 -0.0023655914 -0.0017789757 -0.0020054201
				  0.0000  0.0000000000  0.0000000000  0.0000000000  0.0000000000  0.0000000000
				  2.2655  0.0004825737  0.0026881720  0.0023655914  0.0017789757  0.0020054201
				  4.5438  0.0039142091  0.0053763441  0.0054838710  0.0050134771  0.0052574526
				  6.6056  0.0080965147  0.0100000000  0.0093548387  0.0094339623  0.0100271003
				  8.6238  0.0116353887  0.0135483871  0.0129032258  0.0127762803  0.0150135501
				 10.6640  0.0157104558  0.0172043011  0.0164516129  0.0157951482  0.0184823848
			</tableData>
			<tableData breakPoint="54">
				          0.90          0.95          1.05          1.10          1.20          1.30
				-10.4791 -0.0163497753 -0.0164786222 -0.0182447063 -0.0178921207 -0.0170417890 -0.0158422648
				 -8.4608 -0.0125838869 -0.0122531081 -0.0133135320 -0.0130783748 -0.0132535400 -0.0125189207
				 -6.3946 -0.0083462577 -0.0075570086 -0.0084997721 -0.0089705071 -0.0087531270 -0.0089575988
				 -4.3526 -0.0045804857 -0.0034497216 -0.0045097715 -0.0050981645 -0.0042530655 -0.0046818737
				 -2.1457 -0.0016414829 -0.0012248927 -0.0022841232 -0.0027553408 -0.0003461225 -0.0006450665
				  0.0000  0.0000000000  0.0000000000  0.0000000000  0.0000000000  0.0000000000  0.0000000000
				  2.1457  0.0016414829  0.0012248927  0.0022841232  0.0027553408  0.0003461225  0.0006450665
				  4.3526  0.0045804857  0.0034497216  0.0045097715  0.0050981645  0.0042530655  0.0046818737
				  6.3946  0.0083462577  0.0075570086  0.0084997721  0.0089705071  0.0087531270  0.0089575988
				  8.4608  0.0125838869  0.0122531081  0.0133135320  0.0130783748  0.0132535400  0.0125189207
				 10.4791  0.0163497753  0.0164786222  0.0182447063  0.0178921207  0.0170417890  0.0158422648
			</tableData>
		</table>
	</function>

	<axis name="LIFT">

		<function name="aero/coefficient/CL">
			<product>
				<property>aero/qbar-psf</property>
				<property>metrics/Sw-sqft</property>
				<property>aero/coefficient/CLalpha</property>
			</product>
		</function>

	</axis>

	<axis name="DRAG">

		<!--function name="aero/coefficient/CD">
			<product>
				<property>aero/qbar-psf</property>
				<property>metrics/Sw-sqft</property>
			</product>
		</function-->

	</axis>

	<axis name="SIDE">

		<function name="aero/coefficient/CY">
			<product>
				<property>aero/qbar-psf</property>
				<property>metrics/Sw-sqft</property>
				<property>aero/coefficient/CYbeta</property>
			</product>
		</function>

	</axis>

	<axis name="ROLL">

		<!--function name="aero/coefficient/Cl">
			<product>
				<property>aero/qbar-psf</property>
				<property>metrics/Sw-sqft</property>
				<property>metrics/bw-ft</property>
			</product>
		</function-->

	</axis>

	<axis name="PITCH">

		<!--function name="aero/coefficient/Cm">
			<product>
				<property>aero/qbar-psf</property>
				<property>metrics/Sw-sqft</property>
				<property>metrics/cbarw-ft</property>
			</product>
		</function-->

	</axis>

	<axis name="YAW">

		<function name="aero/coefficient/Cn">
			<product>
				<property>aero/qbar-psf</property>
				<property>metrics/Sw-sqft</property>
				<property>metrics/bw-ft</property>
				<property>aero/coefficient/Cnbeta</property>
			</product>
		</function>

	</axis>

</aerodynamics>
